# 1. Рассчеты конденсаторов часового и тактового кристалов для микроконтроллера STM32
# Микроконтроллерный кварц
# В таблице указано значение 1.5 mA/V. Это критический параметр. Чтобы кварц гарантированно завелся в любых условиях (температура, разброс параметров), нужно соблюдать правило «запаса усиления» (GainMargin):
# 1. ABLS-8.000MHZ-12-B-4-Y-T
# 2. J49SMH-A-G-G-K-8M0 (pin to pin аналог?)
f := 8 MHz
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ESR := 80 Ω
C_0 := 7*pF
C_L := 12*pF
g_m_crit := 4*ESR*(2*π*f)^2*(C_0 + C_L)^2 = 0.291875 mA/V
g_m := 1.5 mA/V
GainMargin := g_m/g_m_crit = 5.13919
# 1. ABLS-8.000MHZ-12-B-4-Y-T
Cp := 3*pF
C_L := 12*pF
C1 := 2*(C_L - Cp) = 18 pF
# Получается вот это будут уже кондеры которые ставим на кварц
# Часовой кварц
f := 32.768 kHz  # 1. ABS06-107-32.768KHZ-T
# STM32 использовать в коде !! LSEDRV[1:0] = 10 Medium high drive capability Gmcritmax = 1.7 μA/V
ESR := 60 kΩ
C_0 := 1.7*pF
C_L := 4*pF
g_m_crit := 4*ESR*(2*π*f)^2*(C_0 + C_L)^2 = 0.330537 μA/V
g_m := 1.7 μA/V
GainMargin := g_m/g_m_crit = 5.14314
Cp := 3*pF
C_L := 4*pF
C1 := 2*(C_L - Cp) = 2 pF
# Получается вот это будут уже кондеры которые ставим на кварц
C_VCAP := (2.2*10^-6) F
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